# Вариант 2
# 1).
y1(x) := (2*x^2 - 1)*sqrt(1 + x^2)/(3*x^2)
d/dx(y1(x)) → 4*sqrt(x^2 + 1)/(3*x) + (2*x^2 - 1)/(3*x*sqrt(x^2 + 1)) - 2*(2*x^2 - 1)*sqrt(x^2 + 1)/(3*x^3)
# 2).
y2(x) := x*cos(x^2) + 4*sqrt(x + 2)
d^2/dx^2(y2(x)) → -6*x*sin(x^2) - 4*x^3*cos(x^2) - 1/(x + 2)^(3/2)
# 3).
y3(x) := (x^2 - 2*x - 3)/(4*x + 3)
x0 := 4
dy(x) := d^2/dx^2(y3(x))
dy(2) = -0.0225394
# 4).
S(t) := 9*t^3 - 4*t^2 + 72*t - 15
v(t) := d/dt(S(t)) → 27*t^2 - 8*t + 72
a(t) := d^2/dt^2(S(t)) → 54*t - 8
v(3) = 291
a(3) = 154
# 5).
v(t) == 260 solve, t → [2*sqrt(1273)/27 + 4/27; 4/27 - 2*sqrt(1273)/27] = [2.79105; -2.49475]
# время = 2,791
# 6).
f(x) := 3*x^3 - x^2 - 3*x + 3 → 3*x^3 - x^2 - 3*x + 3
f(-1) = 2
df(x) := d/dx(f(x))
df(-1) = 8
# касательная
kas(x) := f(-1) + df(-1)*(x + 1) → 8*x + 10
# нормаль
nor(x) := f(-1) - (x + 1)/df(-1) → 15/8 - x/8
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k ≠ 0
# 7).
y7(x) := (3*x^3 - x^2 + 1)/(x^2 + 3*x + 3)
k ≠ ∞
k := limit(y7(x)/x, x → ∞) → 3
b := limit(y7(x) - k*x, x → ∞) → -10
y(x) := k*x + b
y(x) → 3*x - 10
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# 8).
g(x) := 3*x^3 + 3*x^2 - x - 2 → 3*x^3 + 3*x^2 - x - 2  # отрезок [-3;0]
dg(x) := d/dx(g(x)) → 9*x^2 + 6*x - 1
dg(x) == 0 solve, x → [sqrt(2)/3 - 1/3; -sqrt(2)/3 - 1/3] = [0.138071; -0.804738]
g(0) = -2
g(-0.805) = -0.815905  # - набольшее
g(-3) = -53  # - наименьшее
dg(-3) = 62
dg(-0.805) = 0.002225
dg(0) = -1
# Возрастает (-3;-0.805)
# Убывает (-0.805;-∞)
